# OpenSim document version 40500
ScaleTool Subject-test-scaled-scaled:
  mass: 64.6184 [kg]
  height: -1
  age: -1
  ModelScaler:
    apply: true
    scaling_order: measurements
    marker_file: Mazen0006.trc
    time_range: 0 1
    preserve_mass_distribution: true
    MeasurementSet:
      Measurement pelvis_Z: apply=true
        MarkerPair: markers=(MT_WaistRFront MT_WaistLFront)
        BodyScale pelvis: axes=Z
      Measurement sarcum_z: apply=true
        MarkerPair: markers=(MT_WaistLBack MT_WaistRBack)
        BodyScale sacrum: axes=Z
      Measurement torso_y: apply=true
        MarkerPair: markers=(MT_HeadFront MT_WaistRBack)
        BodyScale torso: axes=Y
      Measurement clavicle_1: apply=true
        MarkerPair: markers=(MT_RShoulderBack MT_RShoulderTop)
        BodyScale clavicle_1: axes=Z
  MarkerPlacer:
    apply: true
    marker_file: Mazen0006.trc
    time_range: 0 1
    max_marker_movement: -1
    IKTaskSet:
      IKMarkerTask MT_SpineTop: apply=true weight=1
      IKMarkerTask MT_BackR: apply=true weight=1
      IKMarkerTask MT_BackL: apply=true weight=1
      IKMarkerTask MT_RShoulderTop: apply=true weight=1
      IKMarkerTask MT_LShoulderTop: apply=true weight=1
      IKMarkerTask MT_RWristIn: apply=true weight=1
      IKMarkerTask MT_LWristIn: apply=true weight=1
      IKMarkerTask MT_RWristOut: apply=true weight=1
      IKMarkerTask MT_LWristOut: apply=true weight=1
      IKMarkerTask MT_RElbowOut: apply=true weight=1
      IKMarkerTask MT_LElbowOut: apply=true weight=1
      IKMarkerTask MT_RArm: apply=true weight=1
      IKMarkerTask MT_LArm: apply=true weight=1
      IKMarkerTask MT_WaistRBack: apply=true weight=1
      IKMarkerTask MT_WaistLBack: apply=true weight=1
      IKMarkerTask MT_WaistLFront: apply=true weight=1
      IKMarkerTask MT_Chest: apply=true weight=1
      IKMarkerTask MT_HeadFront: apply=true weight=1
      IKMarkerTask MT_RHandOut: apply=true weight=1
      IKMarkerTask MT_LHandOut: apply=true weight=1
      IKMarkerTask MT_RShoulderBack: apply=true weight=1
      IKMarkerTask MT_LShoulderBack: apply=true weight=1
      IKMarkerTask MT_WaistRFront: apply=true weight=1
      IKMarkerTask MT_HeadTop: apply=true weight=1
      IKMarkerTask MT_HeadL: apply=true weight=1
      IKMarkerTask MT_HeadR: apply=true weight=1
